<Lems>

    <!-- This is a file which can be read and executed by the LEMS Interpreter.
         It imports the LEMS definitions of the core NeuroML 2 Components,
         imports in "pure" NeuroML 2 and contains some LEMS elements for running
         a simulation -->

    <Target component="sim1"/>

    <Include file="Cells.xml"/>
    <Include file="Networks.xml"/>
    <Include file="Simulation.xml"/>

    <!-- Including file with a <neuroml> root, a "real" NeuroML 2 file -->
    <Include file="simplenet.nml"/>

    <Simulation id="sim1" length="300ms" step="0.01ms" target="simplenet">

        <Display id="d1" title="Membrane potentials Pop0" timeScale="1ms" xmin="0" xmax="300" ymin="-70" ymax="-45">
                <Line id="pop0_0_v" quantity="Pop0[0]/v" scale="1mV" color="#ffffff" timeScale="1ms"/>
                <Line id="pop0_1_v" quantity="Pop0[1]/v" scale="1mV" color="#f00fff" timeScale="1ms"/>
                <Line id="pop0_2_v" quantity="Pop0[2]/v" scale="1mV" color="#fff00f" timeScale="1ms"/>
                <Line id="pop0_3_v" quantity="Pop0[3]/v" scale="1mV" color="#ff0a0f" timeScale="1ms"/>
                <Line id="pop0_4_v" quantity="Pop0[4]/v" scale="1mV" color="#66f00f" timeScale="1ms"/>
        </Display>

        <Display id="d2" title="Membrane potentials Pop1" timeScale="1ms" xmin="0" xmax="300" ymin="-70" ymax="-45">
                <Line id="pop1_0_v" quantity="Pop1[0]/v" scale="1mV" color="#fff00f" timeScale="1ms"/>
                <Line id="pop1_1_v" quantity="Pop1[1]/v" scale="1mV" color="#fee00a" timeScale="1ms"/>
                <Line id="pop1_2_v" quantity="Pop1[2]/v" scale="1mV" color="#ffaa0f" timeScale="1ms"/>
                <Line id="pop1_3_v" quantity="Pop1[3]/v" scale="1mV" color="#555a0f" timeScale="1ms"/>
                <Line id="pop1_4_v" quantity="Pop1[4]/v" scale="1mV" color="#44440f" timeScale="1ms"/>
        </Display>

        <OutputFile id="of0" fileName="Pop0_v.dat">
            <OutputColumn id="v0" quantity="Pop0[0]/v" />
            <OutputColumn id="v1" quantity="Pop0[1]/v" />
            <OutputColumn id="v2" quantity="Pop0[2]/v" />
            <OutputColumn id="v3" quantity="Pop0[3]/v" />
            <OutputColumn id="v4" quantity="Pop0[4]/v" />
        </OutputFile>
        <OutputFile id="of1" fileName="Pop1_v.dat">
            <OutputColumn id="v0" quantity="Pop1[0]/v" />
            <OutputColumn id="v1" quantity="Pop1[1]/v" />
            <OutputColumn id="v2" quantity="Pop1[2]/v" />
            <OutputColumn id="v3" quantity="Pop1[3]/v" />
            <OutputColumn id="v4" quantity="Pop1[4]/v" />
        </OutputFile>

    </Simulation>

</Lems>
